# 1 Вар.
nthroot(-nthroot(3.475 + (5 + 1/11), 5) - sqrt((2 + 124.33/70.3)/9.1/(nthroot((2 + 2/5) - 2.3, 5)/7.7)) + (2 + 1/4*1/0.75)/(9 - 50/(2 + 2.2*10/22)) - 1/sqrt(π), 3) = -1.66949
# 2 Вар.
26/nthroot(((99.06 - 40.81)*2/(3.14/sqrt(28.57 - 25.15)) - sqrt((3.0/0.2 + 4.2/0.1)/((1/0.3 - 1.2)/12.4))), 3) + 12/21/(8/28) + ((1 + nthroot(10, 3))/33.15) = 9.13339
# [  ] - те же скобки, что и ( ). Проставлены для удобства чтения выражения.
# 3 Вар.
((4.2 + (11 + 5/7))*1.78/(2/6 - 1/7) - sqrt((4.5 - (1 + 7/9))*12/((2 + 3/20) - 0.45)))/(32/41) + (1/((1 + π/nthroot(3, 5))/(1 + e/sqrt(2))))^(1/3) = 185.869
# [  ] - те же скобки, что и ( ). Проставлены для удобства чтения выражения.
# 4 Вар.
(sqrt((3 - (2 + 1/5))/0.002/(sqrt((3 + 1/4) + 0.62)*4)) - nthroot((0.3 - 3/20), 3)*(1 + 1/5)/((2.25 + (2 + 3/5))*1/8))*(1/5)^sqrt(5) = 0.166271
# [  ] - те же скобки, что и ( ). Проставлены для удобства чтения выражения.
# 5 Вар.
nthroot((nthroot((1.1 + (1 + 5/7))*3.0127/(2/3 - 1/11), 4) - nthroot((4.25 - (1 + 5/11))*11/((3 + 3/12) - 0.45), 3))/(9/11), 5) + (1/(π/nthroot(8, 3)))^(1/3) = 0.0628161
# [  ] - те же скобки, что и ( ). Проставлены для удобства чтения выражения.
# 6 Вар.
-nthroot(4.127, 3) - sqrt((1.95 + 54.23/24.5)/0.95/(nthroot((2 + 3/7) - 1.0567, 3)/4.315)) + (2 + 1/2*1/0.25)/(3 - 33/(1 + 3.3*π^2)) + 1/sqrt(π) = -3.18211
# 7 Вар.
sqrt(((34 + 15/24) - nthroot((32 + 9/13), 5))/(0.182*sqrt(0.252)) + (3 + 1/5)*(3 + 2/3))/nthroot(((3 + 3/4)*3/5*3/6), 3) - nthroot((1/0.013)^3, 7)*(2 + 7/121) = 5.22806
# 8 Вар.
sqrt(nthroot(((100 + 5/15) - (96 + 3/7)), 5)/11.7 + 0.1234)/((1 + 3/4)*(1 + 5/6)) + nthroot((2/2.96)^3, 5) + e/3 = 1.84779
# 9 Вар.
sqrt(nthroot((7.2 - 1.7)*sqrt((4 + 6/13))/(((5 + 2/5) - (1 + 1/8))/(13/17)), 5) - sqrt(e) + nthroot((2 + 5/8) - (4 + 4/nthroot(16 - (9 + 15/18), 4))*1/4/2^(2 + 1/5), 3)) + sqrt(4.255) = 2.96991
# 10 Вар.
nthroot((2.5 - 0.8)*nthroot((2 + 1/3), 3)/((2.5 - (1 + 14/15))/(3/7)), 4) + nthroot(8 - (95 + 7/nthroot(30 - (93 + 5/18), 5))*(2 + 1/4)/2^(1 + 1/5), 3) + nthroot(π, 6) = -1.9924
# 11 Вар.
sqrt(((152 + 3/4) - (148 + 3/8))*0.3/0.2) + ((172 + 5/6) - (170 + 1/3) + (3 + 5/12))/(0.8*0.25) - nthroot(6, 5) = 30.7141
# [  ] - те же скобки, что и ( ). Проставлены для удобства чтения выражения.
# 12 Вар.
nthroot((nthroot((85 + 7/30) - (83 + 5/18), 5)/(2 + 1/3)/0.04 + ((140 + 7/30) - (138 + 5/12))/(18 + 1/6)/(0.02 + 1/5)), 3)*1/3 - nthroot(1/π, 3) = 0.0950576
# [  ] - те же скобки, что и ( ). Проставлены для удобства чтения выражения.
# 13 Вар.
(sqrt(((58 + 4/15) - (56 + 7/24))/0.8) + (2 + 1/9)*0.225)/((8 + 3/4)*3/5) - nthroot((1/0.13)^3, 5) = -3.01146
# 14 Вар.
sqrt(2.7 - 0.8)*(2 + 1/3)/((5.2 - 1.4)/nthroot(3/7, 5)) - 2.625 + (8 + 9/11) - nthroot((1.6 + 154.66/70.3)/1.9/(((2 + 2/5) - 1.3)/4.3), 3) + 5^0.12 = 6.13595
# 15 Вар.
26/(sqrt(3/(0.2 - 0.1)/(2.5*(0.8 + 1.2))) + (34.06 - 33.81)*4/(6.84/nthroot(28.57 - 25.15, 3)))^(1/7) + nthroot(π/3/(4/21) + ((1 + 5*sqrt(5))/3.5)^(1/3), 5) = 24.0732
# [  ] - те же скобки, что и ( ). Проставлены для удобства чтения выражения.
# 16 Вар.
((6 - (4 + 1/2))/0.03/(sqrt((3 + 1/20) - 2.65)*4 + 2/5) - nthroot((0.3 - 3/20), 4)*(1 + 1/2)/((1.88 + (2 + 3/25))*1/80))*(1/5)^sqrt(3) = -0.0987602
# 17 Вар.
(nthroot((2.7 - 0.8)*nthroot((2 + 1/3), 3)/((5.2 - 1.4)/(3/7)), 5) + (8 + 9/11)) + (95 + 7/(30 - (93 + 5/18)))*(2 + 1/4)/2^1.2 + 2*π/3 = 104.622
# [  ] - те же скобки, что и ( ). Проставлены для удобства чтения выражения.
# 18 Вар.
(sqrt((((85 + 7/30) - (83 + 5/18))/nthroot((2 + 2/3), 3))/0.04) + ((140 + 7/30) - (138 + 5/12))/(18 + 1/6)/(0.02 + 1/5))*1/3 - nthroot(1/3, 3) = 1.43735
# [  ] - те же скобки, что и ( ). Проставлены для удобства чтения выражения.
# 19 Вар.
(nthroot((((85 + 7/30) - (83 + 5/18))/(2 + 2/3))/0.04, 4) + ((140 + 7/30) - (138 + 5/12))/(18 + 1/6)/(0.02 + 1/5))*1/45 - nthroot(1/3, 5) = -0.746657
# [  ] - те же скобки, что и ( ). Проставлены для удобства чтения выражения.
# 20 Вар.
((((85 + 7/30) - (83 + 5/18))/(2 + 2/3))/0.04 + sqrt(((14 + 4/30) - (10 + 5/12))/(18 + 1/6)/(0.02 + 1/5)))*1/3 - nthroot(1/3, 3) = 5.73919
# [  ] - те же скобки, что и ( ). Проставлены для удобства чтения выражения.
# 21 Вар.
(8 + 9/11) - 1/sqrt(π) - 2.625 - sqrt((1.6 + 154.66/70.3)/1.9/(((2 + 2/5) - 1.3)/4.3)) + (1 + 1/2*1/0.25)/(6 - 46/(1 + 2.2*10)) = 3.58289
# 22 Вар.
(2.7 - 0.8)*(2 + 1/3)/((5.2 - 1.4)/(3/7)) - 2.625 + (8 + 9/11) - (7/(30 - (93 + 5/18)))*(2 + 1/4)/0.2 = 7.93769
# 23 Вар.
nthroot((2.7 - 0.8)*(2 + 1/3)/((5.2 - 1.4)/(3/7)), 5) - sqrt(2.625) + (8 + 9/11) - (95 + 7/(30 - (93 + 5/18)))*(2 + 1/4)/2^1.2 + nthroot(π, 6) = -83.653
nthroot((2.7 - 0.8)*(2 + 1/3)/((5.2 - 1.4)/(3/7)), 5) - sqrt(2.625) + (8 + 9/11) = 8.06855
# 24 Вар.
26/((34.06 - 33.81)*4/(6.84/nthroot(28.57 - 25.15, 5)) - sqrt((3 + 4.2/0.1)/((1/0.3 - 2.7)/4.12))) + 2/3/(4/21) + ((1 + nthroot(5, 3))/3.5)^(1/4) = 2.90164
# [  ] - те же скобки, что и ( ). Проставлены для удобства чтения выражения.
# 25 Вар.
nthroot(sqrt(((40 + 7/30) - (38 + 5/12))/1.9 + (7/8 - 7/30)*(1 + 9/11))*5.143/0.008, 3) - 1/sqrt(2.24^4) = 9.58495
# 26 Вар.
(nthroot(((85 + 7/30) - (83 + 5/18))/(2 + 2/3)/0.04, 5) + ((140 + 7/30) - (138 + 5/12))/(18 + 1/6)/(0.02 + 1/5))*1/3 - nthroot(1/3, 3) = 0.0545393
# [  ] - те же скобки, что и ( ). Проставлены для удобства чтения выражения.
# 27 Вар.
(nthroot(((85 + 7/30) - (83 + 5/18))/(2 + 2/3), 5)/0.04 + ((140 + 7/30) - (138 + 5/12))/(18 + 1/6)/(0.02 + 1/5))*1/3 - nthroot(1/3, 3) = 7.29027
# [  ] - те же скобки, что и ( ). Проставлены для удобства чтения выражения.
# 28 Вар.
26/((34.06 - 33.81)*4/(6.84/(28.57 - 25.15)) - sqrt((3 + 4.2/0.1)/((1/0.3 - 2.7)/4.12))) + 2/3/(4/21) + ((1 + nthroot(5, 3))/3.5)^(1/5) = 2.88476
# [  ] - те же скобки, что и ( ). Проставлены для удобства чтения выражения.
# 29 Вар.
sqrt(2.7 - 0.8)*(2 + 1/3)/nthroot(3/7, 5) - nthroot((1.6 + 154.66/70.3)/1.9/(((2 + 2/5) - 1.3)/4.3), 3) + 5^0.0123 = 2.84547
# 30 Вар.
((6 - (4 + 1/2))/0.03/(sqrt((3 + 1/2) - 2)*15 + 2/5) - nthroot(0.3 - 3/12, 4)*(1 + 1/2)/((18.8 + (7 + 3/25))*1/8))*(1/5)^sqrt(3) = 0.150515
# [  ] - те же скобки, что и ( ). Проставлены для удобства чтения выражения.
# 31 Вар.
sqrt(((52 + 3/4) - (48 + 3/8))/0.7) + ((72 + 5/6) - (37 + 1/3) + (13 + 5/12))/(0.8*0.225) - nthroot(2, 8) = 273.169
# 32 Вар.
1/((5.2 - 1.4)/(3/7)) + e - (9 + 7/(1 - (20 + 5/18)))*(3 + 3/4)/0.2 + π = -155.969
# 33 Вар.
1/((34.06 - 33.81)*4/(6.84/(28.57 - 25.15)) - sqrt((3 + 4.2/0.1)/((1/0.3 - 2.7)/1^2.25))) + 4/21/(2/3) + ((1 + nthroot(5, 3))/3.5)^(1/5) = 1.10972
# [  ] - те же скобки, что и ( ). Проставлены для удобства чтения выражения.
# 34 Вар.
(nthroot((7/18 - 5/30)/(2/3)/0.02, 4) + (7/30 - 5/12)/(1/6)/(0.04 + 1/5))*1/45 - nthroot(1/3, 5) = -0.859693
# 35 Вар.
26/((34.06 - 33.81)/nthroot(28.57 - 25.15, 5) - sqrt((3 + 4/0.1)/(1/0.3 - 2))) + 2/3/(4/21) + ((1 + nthroot(5, 3))/3.5)^(1/4) = -0.303525
