A := [1, 2, 3, 4; 3, 1, 2, 1; 2, 3, 4, 5; 3, 4, 3, 6]
|A| = 8
1*det([1, 2, 1; 3, 4, 5; 4, 3, 6]) - 2*det([3, 2, 1; 2, 4, 5; 3, 3, 6]) + 3*det([3, 1, 1; 2, 3, 5; 3, 4, 6]) - 4*det([3, 1, 2; 2, 3, 4; 3, 4, 3]) = 8
B := [1, 2, 3, 4; 1, 1/3, 2/3, 1/3; 1, 3/2, 2, 5/2; 1, 4/3, 1, 2]
C := [
    1, 2, 3, 4;
    1 - 1, 1/3 - 2, 2/3 - 3, 1/3 - 4;
    1 - 1, 3/2 - 2, 2 - 3, 5/2 - 4;
    1 - 1, 4/3 - 2, 1 - 3, 2 - 4
]
C → [1, 2, 3, 4; 0, -5/3, -7/3, -11/3; 0, -1/2, -1, -3/2; 0, -2/3, -2, -2]
D := [
    1, 2, 3, 4;
    0, 1, -7/3/(-5/3), -11/3/(-5/3);
    0, 1, -1/(-1/2), -3/2/(-1/2);
    0, 1, -2/(-2/3), -2/(-2/3)
]
D → [1, 2, 3, 4; 0, 1, 7/5, 11/5; 0, 1, 2, 3; 0, 1, 3, 3]
E := [1, 2, 3, 4; 0, 1, 7/5, 11/5; 0, 1 - 1, 2 - 7/5, 3 - 11/5; 0, 1 - 1, 3 - 7/5, 3 - 11/5]
E → [1, 2, 3, 4; 0, 1, 7/5, 11/5; 0, 0, 3/5, 4/5; 0, 0, 8/5, 4/5]
F := [1, 2, 3, 4; 0, 1, 7/5, 11/5; 0, 0, 1, 4/5/(3/5); 0, 0, 1, 4/5/(8/5)]
F → [1, 2, 3, 4; 0, 1, 7/5, 11/5; 0, 0, 1, 4/3; 0, 0, 1, 1/2]
G := [1, 2, 3, 4; 0, 1, 7/5, 11/5; 0, 0, 1, 4/3; 0, 0, 1 - 1, 1/2 - 4/3]
G → [1, 2, 3, 4; 0, 1, 7/5, 11/5; 0, 0, 1, 4/3; 0, 0, 0, -5/6]
