sin(x) series → x - x^3/6 + x^5/120
cos(x) series → 1 - x^2/2 + x^4/24
e^x series → 1 + x + x^2/2 + x^3/6 + x^4/24 + x^5/120
1 - cos(x) series → x^2/2 - x^4/24 + x^6/720
asin(x) series → x + x^3/6 + 3*x^5/40
acos(x) series → π/2 - x - x^3/6 - 3*x^5/40
e^(3*x) series → 1 + 3*x + 9*x^2/2 + 9*x^3/2 + 27*x^4/8 + 81*x^5/40
(1 + x)^y series, x → 1 + x*y - x^2*(y/2 - y^2/2) - x^3*(y*(y/4 - y^2/6) - y/3 + y^2/4) - x^4*(y/4 - y*(y/4 - y^2/6)/2 - y^2/6 + y*(y*(y/12 - y^2/24) - y/6 + y^2/12)) - x^5*(y*(y/8 - y*(y/12 - y^2/24)/2 - y^2/18 + y*(y*(y/48 - y^2/120) - y/18 + y^2/48)) - y/5 + y*(y/4 - y^2/6)/3 + y^2/8 - y*(y*(y/12 - y^2/24) - y/6 + y^2/12)/2)
(1 + x)^y series, y → 1 + y*ln(x + 1) + y^2*ln(x + 1)^2/2 + y^3*ln(x + 1)^3/6 + y^4*ln(x + 1)^4/24 + y^5*ln(x + 1)^5/120
1/sin(x) series → x/6 + 1/x + 7*x^3/360
csc(x) series → x/6 + 1/x + 7*x^3/360
sec(x) series → 1 + x^2/2 + 5*x^4/24
atan(x) series → x - x^3/3 + x^5/5
sinh(x) series → x + x^3/6 + x^5/120
cosh(x) series → 1 + x^2/2 + x^4/24
tanh(x) series → x - x^3/3 + 2*x^5/15
ln(1/(x + 1)) series → -x + x^2/2 - x^3/3 + x^4/4 - x^5/5 + x^6/6
ln(x + 1) series → x - x^2/2 + x^3/3 - x^4/4 + x^5/5 - x^6/6
(x + 1)^x series → 1 + x^2 - x^3/2 + 5*x^4/6 - 3*x^5/4
ln(2*x + 1) series → 2*x - 2*x^2 + 8*x^3/3 - 4*x^4 + 32*x^5/5 - 32*x^6/3
ln(3*x + 1) series → 3*x - 9*x^2/2 + 9*x^3 - 81*x^4/4 + 243*x^5/5 - 243*x^6/2
f1(x) := x - x^3/3!
f2(x) := x - x^3/3! + x^5/5!
(25*π/180)^3/3! = 0.0138453
f3(x) := x - x^3/3! + x^5/5! - x^7/7!
25*π/180 = 0.436332
f4(x) := x - x^3/3! + x^5/5! - x^7/7! + x^9/9!
(25*π/180)^5/5! = 0.000131797
f5(x) := x - x^3/3! + x^5/5! - x^7/7! + x^9/9! - x^11/11!
f1(25*π/180) = 0.422487
f2(25*π/180) = 0.422619
f3(25*π/180) = 0.422618
f4(25*π/180) = 0.422618
sin(25*π/180) = 0.422618
